# Ice with amoeba !

units           real
boundary        p p p

atom_style      amoeba
bond_style      class2
angle_style     amoeba
dihedral_style  none

# per-atom properties required by AMOEBA or HIPPO

fix             amtype all property/atom i_amtype ghost yes
fix             extra all property/atom i_amgroup d_redID d_pval ghost yes
fix             extra2 all property/atom i_polaxe d2_xyzaxis 3

# read data file

read_data       .data/data.ice8.amoeba fix amtype NULL "Tinker Types"

# force field

pair_style      amoeba
pair_coeff      * * .data/amoeba_water.prm .data/amoeba_ice.key

special_bonds   lj/coul 0.5 0.5 0.5 one/five yes

# computes

group           h_atoms id 2
group           o_atoms id 1

compute         h_msd h_atoms msd
compute         o_msd o_atoms msd
compute         h_vacf h_atoms vacf
compute         o_vacf o_atoms vacf

# thermo output

thermo_style    custom step temp press etotal vol &
  c_h_msd[4] c_o_msd[4] c_h_vacf[4] c_o_vacf[4]

dump            mydmp all custom 1000 temp_ramp_aniso.lammpstrj id type x y z vx vy vz
dump_modify     mydmp sort id

# initial conditions

variable        temp equal 250.0
variable        press equal 30000.0

velocity        all create ${temp} 45746

# minimization

minimize        1.0e-6 1.0e-6 100000 100000

# dynamics
thermo          100

variable        dt internal 1.0

timestep        ${dt}

variable        tdamp equal "100.0*dt"
variable        pdamp equal "1000.0*dt"

fix             myfix all momentum 10 linear 1 1 1

fix             1 all nvt temp ${temp} ${temp} ${tdamp}

run             50000

unfix           1

variable        mypress equal press
fix             2 all npt temp ${temp} ${temp} ${tdamp} iso ${mypress} ${press} ${pdamp}
variable        mypress delete

run             50000

unfix           2

label           temp_ramp
variable        new_temp equal "temp+10"
print           "new loop at ${temp}"

fix             3 all npt temp ${new_temp} ${temp} ${tdamp} aniso ${press} ${press} ${pdamp}
run             10000
unfix           3

variable        temp equal ${new_temp}
fix             4 all npt temp ${temp} ${temp} ${tdamp} aniso ${press} ${press} ${pdamp}
run             100000

if              "${temp} >= 310" then "jump SELF break" else "unfix 4" "jump SELF temp_ramp"


label           break
write_restart   restart.temp_ramp
print           "finished!"
